<?xml version="1.0"?>
<aerodynamics>

	<axis name="LIFT">

		<function name="aero/force/lift-due-to-alpha-and-flaps">
			<description>lift due to alpha and flaps</description>
			<product>
				<property>aero/qbar-psf</property>
				<property>metrics/Sw-sqft</property>
				<table>
					<independentVar lookup="row">aero/alpha-deg</independentVar>
					<independentVar lookup="column">fcs/flap-pos-deg</independentVar>
					<tableData>
               0         15         30
-25.0  -1.884927  -1.570929  -1.298876
-22.5  -1.674393  -1.376292  -1.121808
-20.0  -1.459283  -1.177351  -0.940721
-17.5  -1.241206  -0.975505  -0.756826
-15.0  -1.021754  -0.772144  -0.571324
-12.5  -0.802492  -0.568648  -0.385384
-10.0  -0.584982  -0.366394  -0.200115
 -7.5  -0.370904  -0.166806  -0.016363
 -5.0  -0.162337   0.028589   0.164635
 -2.5   0.041172   0.220073   0.341549
  0.0   0.247985   0.415205   0.523200
  2.5   0.436161   0.591732   0.686223
  5.0   0.621661   0.765621   0.846445
  7.5   0.800636   0.932929   1.000069
 10.0   0.970921   1.091630   1.145360
 12.5   1.130930   1.240270   1.281095
 15.0   1.279257   1.377530   1.406131
 17.5   1.414582   1.502142   1.519326
 20.0   1.535662   1.612880   1.619538
 22.5   1.641347   1.708586   1.705654
 24.0   1.696927   1.758345   1.750110
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					</tableData>
				</table>
			</product>
		</function>

		<function name="aero/force/lift-due-to-the-left-aileron-deflection">
			<description>lift due to the left aileron deflection</description>
			<product>
				<property>aero/qbar-psf</property>
				<property>metrics/Sw-sqft</property>
				<table>
					<independentVar lookup="row">aero/alpha-deg</independentVar>
					<independentVar lookup="column">fcs/left-aileron-pos-deg</independentVar>
					<tableData>
             -12         -5          0          5         10
-25.0  -0.115416  -0.055948   0.000000   0.061256   0.131566
-22.5  -0.120425  -0.057540   0.000000   0.061816   0.131717
-20.0  -0.125160  -0.058986   0.000000   0.062187   0.131483
-17.5  -0.129578  -0.060277   0.000000   0.062375   0.130888
-15.0  -0.133640  -0.061403   0.000000   0.062389   0.129962
-12.5  -0.137307  -0.062354   0.000000   0.062240   0.128736
-10.0  -0.140537  -0.063119   0.000000   0.061936   0.127232
 -7.5  -0.143261  -0.063677   0.000000   0.061466   0.125434
 -5.0  -0.145343  -0.063970   0.000000   0.060778   0.123217
 -2.5  -0.147331  -0.064299   0.000000   0.060358   0.121817
  0.0  -0.146384  -0.063360   0.000000   0.058631   0.117668
  2.5  -0.146582  -0.062927   0.000000   0.057418   0.114514
  5.0  -0.145990  -0.062130   0.000000   0.055906   0.110855
  7.5  -0.144733  -0.061090   0.000000   0.054228   0.106927
 10.0  -0.142933  -0.059852   0.000000   0.052438   0.102829
 12.5  -0.140583  -0.058421   0.000000   0.050553   0.098600
 15.0  -0.137680  -0.056795   0.000000   0.048577   0.094248
 17.5  -0.134201  -0.054977   0.000000   0.046519   0.089797
 20.0  -0.130140  -0.052970   0.000000   0.044390   0.085264
 22.5  -0.125581  -0.050796   0.000000   0.042191   0.080647
 24.0  -0.122584  -0.049412   0.000000   0.040846   0.077854
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					</tableData>
				</table>
			</product>
		</function>

		<function name="aero/force/lift-due-to-the-right-aileron-deflection">
			<description>lift due to the right aileron deflection</description>
			<product>
				<property>aero/qbar-psf</property>
				<property>metrics/Sw-sqft</property>
				<table>
					<independentVar lookup="row">aero/alpha-deg</independentVar>
					<independentVar lookup="column">fcs/right-aileron-pos-deg</independentVar>
					<tableData>
             -12         -5          0          5         10
-25.0  -0.115416  -0.055948   0.000000   0.061256   0.131566
-22.5  -0.120425  -0.057540   0.000000   0.061816   0.131717
-20.0  -0.125160  -0.058986   0.000000   0.062187   0.131483
-17.5  -0.129578  -0.060277   0.000000   0.062375   0.130888
-15.0  -0.133640  -0.061403   0.000000   0.062389   0.129962
-12.5  -0.137307  -0.062354   0.000000   0.062240   0.128736
-10.0  -0.140537  -0.063119   0.000000   0.061936   0.127232
 -7.5  -0.143261  -0.063677   0.000000   0.061466   0.125434
 -5.0  -0.145343  -0.063970   0.000000   0.060778   0.123217
 -2.5  -0.147331  -0.064299   0.000000   0.060358   0.121817
  0.0  -0.146384  -0.063360   0.000000   0.058631   0.117668
  2.5  -0.146582  -0.062927   0.000000   0.057418   0.114514
  5.0  -0.145990  -0.062130   0.000000   0.055906   0.110855
  7.5  -0.144733  -0.061090   0.000000   0.054228   0.106927
 10.0  -0.142933  -0.059852   0.000000   0.052438   0.102829
 12.5  -0.140583  -0.058421   0.000000   0.050553   0.098600
 15.0  -0.137680  -0.056795   0.000000   0.048577   0.094248
 17.5  -0.134201  -0.054977   0.000000   0.046519   0.089797
 20.0  -0.130140  -0.052970   0.000000   0.044390   0.085264
 22.5  -0.125581  -0.050796   0.000000   0.042191   0.080647
 24.0  -0.122584  -0.049412   0.000000   0.040846   0.077854
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					</tableData>
				</table>
			</product>
		</function>

		<function name="aero/force/lift-due-to-the-elevator-deflection">
			<description>lift due to the elevator deflection</description>
			<product>
				<property>aero/qbar-psf</property>
				<property>metrics/Sw-sqft</property>
				<table>
					<independentVar lookup="row">aero/alpha-deg</independentVar>
					<independentVar lookup="column">fcs/elevator-pos-deg</independentVar>
					<tableData>
             -10          0         10
-25.0  -0.048617   0.000000   0.074092
-22.5  -0.049231   0.000000   0.071572
-20.0  -0.049681   0.000000   0.068949
-17.5  -0.049946   0.000000   0.066260
-15.0  -0.049941   0.000000   0.063533
-12.5  -0.049381   0.000000   0.060767
-10.0  -0.047337   0.000000   0.057913
 -7.5  -0.040738   0.000000   0.054979
 -5.0  -0.020464   0.000000   0.053792
 -2.5  -0.055853   0.000000   0.076210
  0.0  -0.058253   0.000000   0.018218
  2.5  -0.050284   0.000000   0.023672
  5.0  -0.053209   0.000000   0.046154
  7.5  -0.055899   0.000000   0.051937
 10.0  -0.058183   0.000000   0.053872
 12.5  -0.060163   0.000000   0.054808
 15.0  -0.061851   0.000000   0.055311
 17.5  -0.063228   0.000000   0.055499
 20.0  -0.064266   0.000000   0.055392
 22.5  -0.064943   0.000000   0.054989
 24.0  -0.065167   0.000000   0.054603
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					</tableData>
				</table>
			</product>
		</function>

	</axis>

	<axis name="DRAG">

		<function name="aero/force/drag-due-to-alpha-and-flaps">
			<description>drag due to alpha and flaps</description>
			<product>
				<property>aero/qbar-psf</property>
				<property>metrics/Sw-sqft</property>
				<sum>
					<value>0.05</value> <!-- added manualy to take body and gear into account -->
					<table>
						<independentVar lookup="row">aero/alpha-deg</independentVar>
						<independentVar lookup="column">fcs/flap-pos-deg</independentVar>
						<tableData>
               0         15         30
-25.0   0.172056   0.182092   0.154229
-22.5   0.141944   0.162136   0.127337
-20.0   0.113051   0.101158   0.101153
-17.5   0.087900   0.078793   0.085299
-15.0   0.070633   0.062349   0.073514
-12.5   0.056793   0.047730   0.063144
-10.0   0.037122   0.031630   0.053660
 -7.5   0.022819   0.022663   0.052210
 -5.0   0.014726   0.020689   0.057576
 -2.5   0.012653   0.023289   0.062837
  0.0   0.015268   0.031866   0.077790
  2.5   0.024060   0.046353   0.096184
  5.0   0.038799   0.066771   0.120991
  7.5   0.059152   0.094307   0.150383
 10.0   0.085384   0.126045   0.185087
 12.5   0.111105   0.151052   0.213237
 15.0   0.133444   0.182274   0.246353
 17.5   0.163319   0.214234   0.280533
 20.0   0.198152   0.253682   0.320546
 22.5   0.237627   0.289076   0.360722
 24.0   0.258969   0.313551   0.384637
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						</tableData>
					</table>
				</sum>
			</product>
		</function>

		<function name="aero/force/drag-due-to-the-left-aileron-deflection">
			<description>drag due to the left aileron deflection</description>
			<product>
				<property>aero/qbar-psf</property>
				<property>metrics/Sw-sqft</property>
				<table>
					<independentVar lookup="row">aero/alpha-deg</independentVar>
					<independentVar lookup="column">fcs/left-aileron-pos-deg</independentVar>
					<tableData>
             -12         -5          0          5         10
-25.0   0.030216   0.011112   0.000000  -0.007986  -0.014220
-22.5   0.025161   0.010574   0.000000  -0.007502  -0.011794
-20.0   0.026252   0.009533   0.000000  -0.005292  -0.009002
-17.5   0.023840   0.008567   0.000000  -0.004825  -0.009557
-15.0   0.019352   0.005604   0.000000   0.001108  -0.003968
-12.5   0.011102   0.001179   0.000000   0.001488  -0.005836
-10.0   0.014306   0.005261   0.000000  -0.002832  -0.003616
 -7.5   0.012654   0.003786   0.000000  -0.001461  -0.000796
 -5.0   0.008956   0.002356   0.000000  -0.000136   0.001846
 -2.5   0.005294   0.000911   0.000000   0.001070   0.004416
  0.0   0.001791  -0.000629   0.000000   0.002396   0.007152
  2.5  -0.001112  -0.002004   0.000000   0.003892   0.010906
  5.0  -0.004492  -0.003440   0.000000   0.005514   0.014741
  7.5  -0.007798  -0.004892   0.000000   0.007171   0.018498
 10.0  -0.011228  -0.006444   0.000000   0.009240   0.018905
 12.5  -0.012220  -0.007059   0.000000   0.006948   0.017772
 15.0  -0.011171  -0.007061   0.000000   0.008726   0.021372
 17.5  -0.012617  -0.006787   0.000000   0.010409   0.023532
 20.0  -0.015851  -0.008132   0.000000   0.011082   0.025012
 22.5  -0.018645  -0.010067   0.000000   0.012251   0.027207
 24.0  -0.016714  -0.008299   0.000000   0.012012   0.026947
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					</tableData>
				</table>
			</product>
		</function>

		<function name="aero/force/drag-due-to-the-right-aileron-deflection">
			<description>drag due to the right aileron deflection</description>
			<product>
				<property>aero/qbar-psf</property>
				<property>metrics/Sw-sqft</property>
				<table>
					<independentVar lookup="row">aero/alpha-deg</independentVar>
					<independentVar lookup="column">fcs/right-aileron-pos-deg</independentVar>
					<tableData>
             -12         -5          0          5         10
-25.0   0.030216   0.011112   0.000000  -0.007986  -0.014220
-22.5   0.025161   0.010574   0.000000  -0.007502  -0.011794
-20.0   0.026252   0.009533   0.000000  -0.005292  -0.009002
-17.5   0.023840   0.008567   0.000000  -0.004825  -0.009557
-15.0   0.019352   0.005604   0.000000   0.001108  -0.003968
-12.5   0.011102   0.001179   0.000000   0.001488  -0.005836
-10.0   0.014306   0.005261   0.000000  -0.002832  -0.003616
 -7.5   0.012654   0.003786   0.000000  -0.001461  -0.000796
 -5.0   0.008956   0.002356   0.000000  -0.000136   0.001846
 -2.5   0.005294   0.000911   0.000000   0.001070   0.004416
  0.0   0.001791  -0.000629   0.000000   0.002396   0.007152
  2.5  -0.001112  -0.002004   0.000000   0.003892   0.010906
  5.0  -0.004492  -0.003440   0.000000   0.005514   0.014741
  7.5  -0.007798  -0.004892   0.000000   0.007171   0.018498
 10.0  -0.011228  -0.006444   0.000000   0.009240   0.018905
 12.5  -0.012220  -0.007059   0.000000   0.006948   0.017772
 15.0  -0.011171  -0.007061   0.000000   0.008726   0.021372
 17.5  -0.012617  -0.006787   0.000000   0.010409   0.023532
 20.0  -0.015851  -0.008132   0.000000   0.011082   0.025012
 22.5  -0.018645  -0.010067   0.000000   0.012251   0.027207
 24.0  -0.016714  -0.008299   0.000000   0.012012   0.026947
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					</tableData>
				</table>
			</product>
		</function>

		<function name="aero/force/drag-due-to-the-elevator-deflection">
			<description>drag due to the elevator deflection</description>
			<product>
				<property>aero/qbar-psf</property>
				<property>metrics/Sw-sqft</property>
				<table>
					<independentVar lookup="row">aero/alpha-deg</independentVar>
					<independentVar lookup="column">fcs/elevator-pos-deg</independentVar>
					<tableData>
             -10          0         10
-25.0   0.027287   0.000000  -0.016509
-22.5   0.028199   0.000000  -0.017810
-20.0   0.025164   0.000000  -0.009011
-17.5   0.020600   0.000000  -0.006274
-15.0   0.011616   0.000000  -0.011215
-12.5   0.010479   0.000000  -0.008923
-10.0   0.014926   0.000000  -0.003698
 -7.5   0.008951   0.000000  -0.001242
 -5.0   0.004541   0.000000   0.000919
 -2.5  -0.006067   0.000000   0.002239
  0.0   0.000412   0.000000   0.003209
  2.5  -0.001443   0.000000   0.007104
  5.0  -0.003717   0.000000   0.013110
  7.5  -0.006424   0.000000   0.015137
 10.0  -0.009757   0.000000   0.014223
 12.5  -0.008330   0.000000   0.016313
 15.0  -0.008580   0.000000   0.021979
 17.5  -0.014272   0.000000   0.028196
 20.0  -0.016398   0.000000   0.030006
 22.5  -0.021060   0.000000   0.029226
 24.0  -0.019043   0.000000   0.034479
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					</tableData>
				</table>
			</product>
		</function>

		<function name="aero/force/drag-due-to-the-rudder-deflection">
			<description>drag due to the rudder deflection</description>
			<product>
				<property>aero/qbar-psf</property>
				<property>metrics/Sw-sqft</property>
				<table>
					<independentVar lookup="row">aero/alpha-deg</independentVar>
					<independentVar lookup="column">fcs/rudder-pos-deg</independentVar>
					<tableData>
             -10          0         10
-25.0   0.002142   0.000000   0.002142
-22.5   0.002210   0.000000   0.002210
-20.0   0.002250   0.000000   0.002250
-17.5   0.002271   0.000000   0.002271
-15.0   0.002302   0.000000   0.002302
-12.5   0.000876   0.000000   0.000876
-10.0   0.002228   0.000000   0.002228
 -7.5   0.002181   0.000000   0.002181
 -5.0   0.002122   0.000000   0.002122
 -2.5   0.002051   0.000000   0.002051
  0.0   0.001993   0.000000   0.001993
  2.5   0.002377   0.000000   0.002377
  5.0   0.002244   0.000000   0.002244
  7.5   0.002669   0.000000   0.002669
 10.0   0.003702   0.000000   0.003702
 12.5   0.003150   0.000000   0.003150
 15.0   0.002167   0.000000   0.002167
 17.5   0.001810   0.000000   0.001810
 20.0   0.001574   0.000000   0.001574
 22.5   0.001408   0.000000   0.001408
 24.0   0.001355   0.000000   0.001355
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					</tableData>
				</table>
			</product>
		</function>

	</axis>

	<axis name="SIDE">

		<function name="aero/force/side-force-due-to-beta">
			<description>side force due to beta</description>
			<product>
				<property>aero/qbar-psf</property>
				<property>metrics/Sw-sqft</property>
				<table>
					<independentVar lookup="row">aero/beta-deg</independentVar>
					<tableData>
-10.0   0.044196
 -9.5   0.041932
 -9.0   0.039732
 -8.5   0.037588
 -8.0   0.035470
 -7.5   0.033346
 -7.0   0.031216
 -6.5   0.029083
 -6.0   0.026904
 -5.5   0.024647
 -5.0   0.022337
 -4.5   0.020019
 -4.0   0.017726
 -3.5   0.015470
 -3.0   0.013248
 -2.5   0.011037
 -2.0   0.008825
 -1.5   0.006633
 -1.0   0.004470
 -0.5   0.002269
  0.0   0.000000
  0.5  -0.002269
  1.0  -0.004470
  1.5  -0.006633
  2.0  -0.008825
  2.5  -0.011037
  3.0  -0.013248
  3.5  -0.015470
  4.0  -0.017726
  4.5  -0.020019
  5.0  -0.022337
  5.5  -0.024647
  6.0  -0.026904
  6.5  -0.029083
  7.0  -0.031216
  7.5  -0.033346
  8.0  -0.035470
  8.5  -0.037588
  9.0  -0.039732
  9.5  -0.041932
 10.0  -0.044196
					</tableData>
				</table>
			</product>
		</function>

		<function name="aero/force/side-force-due-to-the-rudder-deflection">
			<description>side force due to the rudder deflection</description>
			<product>
				<property>aero/qbar-psf</property>
				<property>metrics/Sw-sqft</property>
				<table>
					<independentVar lookup="row">aero/alpha-deg</independentVar>
					<independentVar lookup="column">fcs/rudder-pos-deg</independentVar>
					<tableData>
             -10          0         10
-25.0   0.026654   0.000000  -0.026654
-22.5   0.028525   0.000000  -0.028525
-20.0   0.030174   0.000000  -0.030174
-17.5   0.031578   0.000000  -0.031578
-15.0   0.032716   0.000000  -0.032716
-12.5   0.033575   0.000000  -0.033575
-10.0   0.034148   0.000000  -0.034148
 -7.5   0.034432   0.000000  -0.034432
 -5.0   0.034432   0.000000  -0.034432
 -2.5   0.034154   0.000000  -0.034154
  0.0   0.033630   0.000000  -0.033630
  2.5   0.032917   0.000000  -0.032917
  5.0   0.032041   0.000000  -0.032041
  7.5   0.030998   0.000000  -0.030998
 10.0   0.029759   0.000000  -0.029759
 12.5   0.028303   0.000000  -0.028303
 15.0   0.026445   0.000000  -0.026445
 17.5   0.024597   0.000000  -0.024597
 20.0   0.022338   0.000000  -0.022338
 22.5   0.019906   0.000000  -0.019906
 24.0   0.018454   0.000000  -0.018454
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					</tableData>
				</table>
			</product>
		</function>

		<function name="aero/force/side-force-due-to-the-left-aileron-deflection">
			<description>side force due to the left aileron deflection</description>
			<product>
				<property>aero/qbar-psf</property>
				<property>metrics/Sw-sqft</property>
				<table>
					<independentVar lookup="row">aero/alpha-deg</independentVar>
					<independentVar lookup="column">fcs/left-aileron-pos-deg</independentVar>
					<tableData>
             -12         -5          0          5         10
-25.0  -0.003876  -0.003448   0.000000  -0.000565   0.001997
-22.5  -0.002885  -0.002751   0.000000  -0.000363   0.001912
-20.0  -0.001914  -0.002085   0.000000  -0.000199   0.001791
-17.5  -0.000969  -0.001456   0.000000  -0.000079   0.001629
-15.0  -0.000054  -0.000871   0.000000  -0.000006   0.001427
-12.5   0.000829  -0.000334   0.000000   0.000014   0.001182
-10.0   0.001673   0.000148   0.000000  -0.000021   0.000895
 -7.5   0.002474   0.000571   0.000000  -0.000113   0.000564
 -5.0   0.003225   0.000930   0.000000  -0.000264   0.000195
 -2.5   0.003904   0.001214   0.000000  -0.000472  -0.000219
  0.0   0.004420   0.001378   0.000000  -0.000711  -0.000613
  2.5   0.004986   0.001538   0.000000  -0.001070  -0.001178
  5.0   0.005459   0.001605   0.000000  -0.001458  -0.001729
  7.5   0.005838   0.001592   0.000000  -0.001886  -0.002294
 10.0   0.004944   0.001016   0.000000  -0.001925  -0.002041
 12.5   0.006678   0.001496   0.000000  -0.002977  -0.003719
 15.0   0.005386   0.000724   0.000000  -0.003104  -0.003649
 17.5   0.005680   0.000562   0.000000  -0.003765  -0.004489
 20.0   0.007562   0.000991   0.000000  -0.004891  -0.006083
 22.5   0.003931  -0.000706   0.000000  -0.004584  -0.005295
 24.0   0.003853  -0.000922   0.000000  -0.004975  -0.005777
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					</tableData>
				</table>
			</product>
		</function>

		<function name="aero/force/side-force-due-to-the-right-aileron-deflection">
			<description>side force due to the right aileron deflection</description>
			<product>
				<property>aero/qbar-psf</property>
				<property>metrics/Sw-sqft</property>
				<table>
					<independentVar lookup="row">aero/alpha-deg</independentVar>
					<independentVar lookup="column">fcs/right-aileron-pos-deg</independentVar>
					<tableData>
             -12         -5          0          5         10
-25.0   0.003876   0.003448   0.000000   0.000565  -0.001997
-22.5   0.002885   0.002751   0.000000   0.000363  -0.001912
-20.0   0.001914   0.002085   0.000000   0.000199  -0.001791
-17.5   0.000969   0.001456   0.000000   0.000079  -0.001629
-15.0   0.000054   0.000871   0.000000   0.000006  -0.001427
-12.5  -0.000829   0.000334   0.000000  -0.000014  -0.001182
-10.0  -0.001673  -0.000148   0.000000   0.000021  -0.000895
 -7.5  -0.002474  -0.000571   0.000000   0.000113  -0.000564
 -5.0  -0.003225  -0.000930   0.000000   0.000264  -0.000195
 -2.5  -0.003904  -0.001214   0.000000   0.000472   0.000219
  0.0  -0.004420  -0.001378   0.000000   0.000711   0.000613
  2.5  -0.004986  -0.001538   0.000000   0.001070   0.001178
  5.0  -0.005459  -0.001605   0.000000   0.001458   0.001729
  7.5  -0.005838  -0.001592   0.000000   0.001886   0.002294
 10.0  -0.004944  -0.001016   0.000000   0.001925   0.002041
 12.5  -0.006678  -0.001496   0.000000   0.002977   0.003719
 15.0  -0.005386  -0.000724   0.000000   0.003104   0.003649
 17.5  -0.005680  -0.000562   0.000000   0.003765   0.004489
 20.0  -0.007562  -0.000991   0.000000   0.004891   0.006083
 22.5  -0.003931   0.000706   0.000000   0.004584   0.005295
 24.0  -0.003853   0.000922   0.000000   0.004975   0.005777
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					</tableData>
				</table>
			</product>
		</function>

	</axis>

	<axis name="PITCH">

		<function name="aero/moment/pitchdamp">
			<description>pitch due to pitch rate</description>
			<product>
				<property>aero/qbar-psf</property>
				<property>metrics/Sw-sqft</property>
				<property>metrics/bw-ft</property>
				<property>aero/bi2vel</property>
				<property>velocities/p-aero-rad_sec</property>
				<value>-0.1</value>
			</product>
		</function>
		<function name="aero/moment/pitch-due-to-alpha-and-flaps">
			<description>pitch due to alpha and flaps</description>
			<product>
				<property>aero/qbar-psf</property>
				<property>metrics/Sw-sqft</property>
				<property>metrics/bw-ft</property>
				<table>
					<independentVar lookup="row">aero/alpha-deg</independentVar>
					<independentVar lookup="column">fcs/flap-pos-deg</independentVar>
					<tableData>
               0         15         30
-25.0  -0.121145  -0.233075  -0.333281
-22.5  -0.113805  -0.231847  -0.336870
-20.0  -0.108402  -0.234140  -0.338499
-17.5  -0.105472  -0.233744  -0.338051
-15.0  -0.104445  -0.233908  -0.334531
-12.5  -0.104020  -0.232949  -0.329521
-10.0  -0.107788  -0.234064  -0.324508
 -7.5  -0.113831  -0.235889  -0.319207
 -5.0  -0.121637  -0.238574  -0.314166
 -2.5  -0.131730  -0.243274  -0.311200
  0.0  -0.149092  -0.254188  -0.313477
  2.5  -0.158446  -0.256217  -0.306268
  5.0  -0.169985  -0.259522  -0.299535
  7.5  -0.181908  -0.262462  -0.291887
 10.0  -0.193599  -0.264597  -0.283582
 12.5  -0.206692  -0.267253  -0.275663
 15.0  -0.218691  -0.270520  -0.269216
 17.5  -0.228885  -0.271308  -0.261278
 20.0  -0.238689  -0.272622  -0.254962
 22.5  -0.247655  -0.272895  -0.249705
 24.0  -0.252175  -0.273212  -0.247103
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					</tableData>
				</table>
			</product>
		</function>

		<function name="aero/moment/pitch-due-to-the-left-aileron-deflection">
			<description>pitch due to the left aileron deflection</description>
			<product>
				<property>aero/qbar-psf</property>
				<property>metrics/Sw-sqft</property>
				<property>metrics/bw-ft</property>
				<table>
					<independentVar lookup="row">aero/alpha-deg</independentVar>
					<independentVar lookup="column">fcs/left-aileron-pos-deg</independentVar>
					<tableData>
             -12         -5          0          5         10
-25.0   0.063012   0.029302   0.000000  -0.030382  -0.064329
-22.5   0.071831   0.033218   0.000000  -0.033990  -0.071416
-20.0   0.080825   0.036935   0.000000  -0.037125  -0.077716
-17.5   0.089246   0.040436   0.000000  -0.040120  -0.083688
-15.0   0.096915   0.043363   0.000000  -0.041675  -0.087959
-12.5   0.103263   0.045608   0.000000  -0.044203  -0.093027
-10.0   0.111352   0.049318   0.000000  -0.047195  -0.096412
 -7.5   0.117590   0.051510   0.000000  -0.048662  -0.098848
 -5.0   0.122493   0.053263   0.000000  -0.049676  -0.100331
 -2.5   0.126725   0.054740   0.000000  -0.050554  -0.101678
  0.0   0.128011   0.054923   0.000000  -0.050102  -0.100234
  2.5   0.129806   0.055280   0.000000  -0.049768  -0.098954
  5.0   0.130075   0.054971   0.000000  -0.048851  -0.096605
  7.5   0.129110   0.054157   0.000000  -0.047520  -0.093484
 10.0   0.127035   0.052902   0.000000  -0.045872  -0.089254
 12.5   0.123643   0.051130   0.000000  -0.043336  -0.084284
 15.0   0.118909   0.048908   0.000000  -0.040977  -0.079199
 17.5   0.113440   0.046159   0.000000  -0.038488  -0.073654
 20.0   0.107353   0.043308   0.000000  -0.035531  -0.067544
 22.5   0.100077   0.040143   0.000000  -0.032409  -0.061175
 24.0   0.095013   0.037833   0.000000  -0.030384  -0.057121
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					</tableData>
				</table>
			</product>
		</function>

		<function name="aero/moment/pitch-due-to-the-right-aileron-deflection">
			<description>pitch due to the right aileron deflection</description>
			<product>
				<property>aero/qbar-psf</property>
				<property>metrics/Sw-sqft</property>
				<property>metrics/bw-ft</property>
				<table>
					<independentVar lookup="row">aero/alpha-deg</independentVar>
					<independentVar lookup="column">fcs/right-aileron-pos-deg</independentVar>
					<tableData>
             -12         -5          0          5         10
-25.0   0.063012   0.029302   0.000000  -0.030382  -0.064329
-22.5   0.071831   0.033218   0.000000  -0.033990  -0.071416
-20.0   0.080825   0.036935   0.000000  -0.037125  -0.077716
-17.5   0.089246   0.040436   0.000000  -0.040120  -0.083688
-15.0   0.096915   0.043363   0.000000  -0.041675  -0.087959
-12.5   0.103263   0.045608   0.000000  -0.044203  -0.093027
-10.0   0.111352   0.049318   0.000000  -0.047195  -0.096412
 -7.5   0.117590   0.051510   0.000000  -0.048662  -0.098848
 -5.0   0.122493   0.053263   0.000000  -0.049676  -0.100331
 -2.5   0.126725   0.054740   0.000000  -0.050554  -0.101678
  0.0   0.128011   0.054923   0.000000  -0.050102  -0.100234
  2.5   0.129806   0.055280   0.000000  -0.049768  -0.098954
  5.0   0.130075   0.054971   0.000000  -0.048851  -0.096605
  7.5   0.129110   0.054157   0.000000  -0.047520  -0.093484
 10.0   0.127035   0.052902   0.000000  -0.045872  -0.089254
 12.5   0.123643   0.051130   0.000000  -0.043336  -0.084284
 15.0   0.118909   0.048908   0.000000  -0.040977  -0.079199
 17.5   0.113440   0.046159   0.000000  -0.038488  -0.073654
 20.0   0.107353   0.043308   0.000000  -0.035531  -0.067544
 22.5   0.100077   0.040143   0.000000  -0.032409  -0.061175
 24.0   0.095013   0.037833   0.000000  -0.030384  -0.057121
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					</tableData>
				</table>
			</product>
		</function>

		<function name="aero/moment/pitch-due-to-the-elevator-deflection">
			<description>pitch due to the elevator deflection</description>
			<product>
				<property>aero/qbar-psf</property>
				<property>metrics/Sw-sqft</property>
				<property>metrics/bw-ft</property>
				<table>
					<independentVar lookup="row">aero/alpha-deg</independentVar>
					<independentVar lookup="column">fcs/elevator-pos-deg</independentVar>
					<tableData>
             -10          0         10
-25.0  -0.103782   0.000000   0.141050
-22.5  -0.115288   0.000000   0.151449
-20.0  -0.126526   0.000000   0.159535
-17.5  -0.136678   0.000000   0.167055
-15.0  -0.146179   0.000000   0.173726
-12.5  -0.155989   0.000000   0.178014
-10.0  -0.162106   0.000000   0.180572
 -7.5  -0.165039   0.000000   0.180812
 -5.0  -0.172717   0.000000   0.178763
 -2.5  -0.163256   0.000000   0.162077
  0.0  -0.172877   0.000000   0.173512
  2.5  -0.181495   0.000000   0.172223
  5.0  -0.182389   0.000000   0.166777
  7.5  -0.181254   0.000000   0.160833
 10.0  -0.178525   0.000000   0.151736
 12.5  -0.172218   0.000000   0.142121
 15.0  -0.164569   0.000000   0.133134
 17.5  -0.157987   0.000000   0.121804
 20.0  -0.148066   0.000000   0.110361
 22.5  -0.136385   0.000000   0.098665
 24.0  -0.129040   0.000000   0.090979
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					</tableData>
				</table>
			</product>
		</function>

	</axis>

	<axis name="ROLL">

		<function name="aero/moment/rolldamp">
			<description>roll due to roll rate</description>
			<product>
				<property>aero/qbar-psf</property>
				<property>metrics/Sw-sqft</property>
				<property>metrics/bw-ft</property>
				<property>aero/bi2vel</property>
				<property>velocities/p-aero-rad_sec</property>
				<value>-0.1</value>
			</product>
		</function>
		<function name="aero/moment/roll-due-to-beta">
			<description>roll due to beta</description>
			<product>
				<property>aero/qbar-psf</property>
				<property>metrics/Sw-sqft</property>
				<property>metrics/bw-ft</property>
				<table>
					<independentVar lookup="row">aero/beta-deg</independentVar>
					<tableData>
-10.0   0.013648
 -9.5   0.013143
 -9.0   0.012359
 -8.5   0.011288
 -8.0   0.010102
 -7.5   0.008993
 -7.0   0.007934
 -6.5   0.006882
 -6.0   0.006019
 -5.5   0.005502
 -5.0   0.005241
 -4.5   0.005096
 -4.0   0.004991
 -3.5   0.004875
 -3.0   0.004706
 -2.5   0.004443
 -2.0   0.003970
 -1.5   0.003088
 -1.0   0.001841
 -0.5   0.000735
  0.0   0.000000
  0.5  -0.000735
  1.0  -0.001841
  1.5  -0.003088
  2.0  -0.003970
  2.5  -0.004443
  3.0  -0.004706
  3.5  -0.004875
  4.0  -0.004991
  4.5  -0.005096
  5.0  -0.005241
  5.5  -0.005502
  6.0  -0.006019
  6.5  -0.006882
  7.0  -0.007934
  7.5  -0.008993
  8.0  -0.010102
  8.5  -0.011288
  9.0  -0.012359
  9.5  -0.013143
 10.0  -0.013648
					</tableData>
				</table>
			</product>
		</function>

		<function name="aero/moment/roll-due-to-the-left-aileron-deflection">
			<description>roll due to the left aileron deflection</description>
			<product>
				<property>aero/qbar-psf</property>
				<property>metrics/Sw-sqft</property>
				<property>metrics/bw-ft</property>
				<table>
					<independentVar lookup="row">aero/alpha-deg</independentVar>
					<independentVar lookup="column">fcs/left-aileron-pos-deg</independentVar>
					<tableData>
             -12         -5          0          5         10
-25.0  -0.037461  -0.016836   0.000000   0.017078   0.035657
-22.5  -0.037931  -0.016960   0.000000   0.016991   0.035350
-20.0  -0.038360  -0.017064   0.000000   0.016892   0.035019
-17.5  -0.038763  -0.017154   0.000000   0.016789   0.034678
-15.0  -0.039153  -0.017238   0.000000   0.016690   0.034344
-12.5  -0.039544  -0.017320   0.000000   0.016600   0.034028
-10.0  -0.039949  -0.017406   0.000000   0.016523   0.033741
 -7.5  -0.040370  -0.017499   0.000000   0.016461   0.033481
 -5.0  -0.040790  -0.017588   0.000000   0.016397   0.033212
 -2.5  -0.041251  -0.017705   0.000000   0.016397   0.033129
  0.0  -0.041264  -0.017638   0.000000   0.016201   0.032608
  2.5  -0.041855  -0.017791   0.000000   0.016186   0.032426
  5.0  -0.042283  -0.017873   0.000000   0.016107   0.032136
  7.5  -0.042701  -0.017955   0.000000   0.016020   0.031833
 10.0  -0.043119  -0.018036   0.000000   0.015922   0.031510
 12.5  -0.043606  -0.018146   0.000000   0.015840   0.031225
 15.0  -0.043873  -0.018168   0.000000   0.015679   0.030801
 17.5  -0.044360  -0.018278   0.000000   0.015575   0.030479
 20.0  -0.044965  -0.018434   0.000000   0.015492   0.030191
 22.5  -0.044754  -0.018274   0.000000   0.015175   0.029515
 24.0  -0.045028  -0.018333   0.000000   0.015088   0.029278
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					</tableData>
				</table>
			</product>
		</function>

		<function name="aero/moment/roll-due-to-the-right-aileron-deflection">
			<description>roll due to the right aileron deflection</description>
			<product>
				<property>aero/qbar-psf</property>
				<property>metrics/Sw-sqft</property>
				<property>metrics/bw-ft</property>
				<table>
					<independentVar lookup="row">aero/alpha-deg</independentVar>
					<independentVar lookup="column">fcs/right-aileron-pos-deg</independentVar>
					<tableData>
             -12         -5          0          5         10
-25.0   0.037461   0.016836   0.000000  -0.017078  -0.035657
-22.5   0.037931   0.016960   0.000000  -0.016991  -0.035350
-20.0   0.038360   0.017064   0.000000  -0.016892  -0.035019
-17.5   0.038763   0.017154   0.000000  -0.016789  -0.034678
-15.0   0.039153   0.017238   0.000000  -0.016690  -0.034344
-12.5   0.039544   0.017320   0.000000  -0.016600  -0.034028
-10.0   0.039949   0.017406   0.000000  -0.016523  -0.033741
 -7.5   0.040370   0.017499   0.000000  -0.016461  -0.033481
 -5.0   0.040790   0.017588   0.000000  -0.016397  -0.033212
 -2.5   0.041251   0.017705   0.000000  -0.016397  -0.033129
  0.0   0.041264   0.017638   0.000000  -0.016201  -0.032608
  2.5   0.041855   0.017791   0.000000  -0.016186  -0.032426
  5.0   0.042283   0.017873   0.000000  -0.016107  -0.032136
  7.5   0.042701   0.017955   0.000000  -0.016020  -0.031833
 10.0   0.043119   0.018036   0.000000  -0.015922  -0.031510
 12.5   0.043606   0.018146   0.000000  -0.015840  -0.031225
 15.0   0.043873   0.018168   0.000000  -0.015679  -0.030801
 17.5   0.044360   0.018278   0.000000  -0.015575  -0.030479
 20.0   0.044965   0.018434   0.000000  -0.015492  -0.030191
 22.5   0.044754   0.018274   0.000000  -0.015175  -0.029515
 24.0   0.045028   0.018333   0.000000  -0.015088  -0.029278
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					</tableData>
				</table>
			</product>
		</function>

		<function name="aero/moment/roll-due-to-the-rudder-deflection">
			<description>roll due to the rudder deflection</description>
			<product>
				<property>aero/qbar-psf</property>
				<property>metrics/Sw-sqft</property>
				<property>metrics/bw-ft</property>
				<table>
					<independentVar lookup="row">aero/alpha-deg</independentVar>
					<independentVar lookup="column">fcs/rudder-pos-deg</independentVar>
					<tableData>
             -10          0         10
-25.0   0.011793   0.000000  -0.011793
-22.5   0.011924   0.000000  -0.011924
-20.0   0.011804   0.000000  -0.011804
-17.5   0.011436   0.000000  -0.011436
-15.0   0.010833   0.000000  -0.010833
-12.5   0.010016   0.000000  -0.010016
-10.0   0.009016   0.000000  -0.009016
 -7.5   0.007869   0.000000  -0.007869
 -5.0   0.006614   0.000000  -0.006614
 -2.5   0.005296   0.000000  -0.005296
  0.0   0.003962   0.000000  -0.003962
  2.5   0.002655   0.000000  -0.002655
  5.0   0.001410   0.000000  -0.001410
  7.5   0.000264   0.000000  -0.000264
 10.0  -0.000747   0.000000   0.000747
 12.5  -0.001589   0.000000   0.001589
 15.0  -0.002249   0.000000   0.002249
 17.5  -0.002665   0.000000   0.002665
 20.0  -0.002876   0.000000   0.002876
 22.5  -0.002861   0.000000   0.002861
 24.0  -0.002739   0.000000   0.002739
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					</tableData>
				</table>
			</product>
		</function>

	</axis>

	<axis name="YAW">

		<function name="aero/moment/yawdamp">
			<description>yaw due to yaw rate</description>
			<product>
				<property>aero/qbar-psf</property>
				<property>metrics/Sw-sqft</property>
				<property>metrics/bw-ft</property>
				<property>aero/bi2vel</property>
				<property>velocities/r-aero-rad_sec</property>
				<value>-0.01</value>
			</product>
		</function>
		<function name="aero/moment/yaw-due-to-beta">
			<description>yaw due to beta</description>
			<product>
				<property>aero/qbar-psf</property>
				<property>metrics/Sw-sqft</property>
				<property>metrics/bw-ft</property>
				<table>
					<independentVar lookup="row">aero/beta-deg</independentVar>
					<tableData>
-10.0  -0.016379
 -9.5  -0.015568
 -9.0  -0.014779
 -8.5  -0.014004
 -8.0  -0.013230
 -7.5  -0.012450
 -7.0  -0.011667
 -6.5  -0.010881
 -6.0  -0.010077
 -5.5  -0.009242
 -5.0  -0.008385
 -4.5  -0.007521
 -4.0  -0.006663
 -3.5  -0.005817
 -3.0  -0.004982
 -2.5  -0.004150
 -2.0  -0.003319
 -1.5  -0.002496
 -1.0  -0.001683
 -0.5  -0.000854
  0.0   0.000000
  0.5   0.000854
  1.0   0.001683
  1.5   0.002496
  2.0   0.003319
  2.5   0.004150
  3.0   0.004982
  3.5   0.005817
  4.0   0.006663
  4.5   0.007521
  5.0   0.008385
  5.5   0.009242
  6.0   0.010077
  6.5   0.010881
  7.0   0.011667
  7.5   0.012450
  8.0   0.013230
  8.5   0.014004
  9.0   0.014779
  9.5   0.015568
 10.0   0.016379
					</tableData>
				</table>
			</product>
		</function>

		<function name="aero/moment/yaw-due-to-the-rudder-deflection">
			<description>yaw due to the rudder deflection</description>
			<product>
				<property>aero/qbar-psf</property>
				<property>metrics/Sw-sqft</property>
				<property>metrics/bw-ft</property>
				<table>
					<independentVar lookup="row">aero/alpha-deg</independentVar>
					<independentVar lookup="column">fcs/rudder-pos-deg</independentVar>
					<tableData>
             -10          0         10
-25.0  -0.004965   0.000000   0.004965
-22.5  -0.006313   0.000000   0.006313
-20.0  -0.007654   0.000000   0.007654
-17.5  -0.008941   0.000000   0.008941
-15.0  -0.010146   0.000000   0.010146
-12.5  -0.010774   0.000000   0.010774
-10.0  -0.012058   0.000000   0.012058
 -7.5  -0.012725   0.000000   0.012725
 -5.0  -0.013171   0.000000   0.013171
 -2.5  -0.013381   0.000000   0.013381
  0.0  -0.013361   0.000000   0.013361
  2.5  -0.013124   0.000000   0.013124
  5.0  -0.012668   0.000000   0.012668
  7.5  -0.011995   0.000000   0.011995
 10.0  -0.011116   0.000000   0.011116
 12.5  -0.010053   0.000000   0.010053
 15.0  -0.008896   0.000000   0.008896
 17.5  -0.007591   0.000000   0.007591
 20.0  -0.006273   0.000000   0.006273
 22.5  -0.004950   0.000000   0.004950
 24.0  -0.004164   0.000000   0.004164
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					</tableData>
				</table>
			</product>
		</function>

		<function name="aero/moment/yaw-due-to-the-left-aileron-deflection">
			<description>yaw due to the left aileron deflection</description>
			<product>
				<property>aero/qbar-psf</property>
				<property>metrics/Sw-sqft</property>
				<property>metrics/bw-ft</property>
				<table>
					<independentVar lookup="row">aero/alpha-deg</independentVar>
					<independentVar lookup="column">fcs/left-aileron-pos-deg</independentVar>
					<tableData>
             -12         -5          0          5         10
-25.0   0.001466   0.000614   0.000000  -0.000776  -0.001542
-22.5   0.001463   0.000609   0.000000  -0.000744  -0.001575
-20.0   0.001385   0.000574   0.000000  -0.000837  -0.001297
-17.5   0.001223   0.000502   0.000000  -0.000750  -0.001279
-15.0   0.000698   0.000116   0.000000  -0.003316  -0.003131
-12.5   0.001357   0.000259   0.000000  -0.002333  -0.000950
-10.0   0.000650   0.000020   0.000000  -0.000127  -0.000407
 -7.5  -0.000455  -0.000127   0.000000   0.000013  -0.000133
 -5.0  -0.000766  -0.000297   0.000000   0.000173   0.000203
 -2.5  -0.001156  -0.000489   0.000000   0.000377   0.000605
  0.0  -0.001570  -0.000633   0.000000   0.000526   0.000879
  2.5  -0.002081  -0.000816   0.000000   0.000625   0.000831
  5.0  -0.002441  -0.000950   0.000000   0.000629   0.000693
  7.5  -0.002715  -0.001058   0.000000   0.000597   0.000515
 10.0  -0.002390  -0.000890   0.000000   0.000197   0.001262
 12.5  -0.002794  -0.001421   0.000000   0.001713   0.002715
 15.0  -0.004298  -0.001425   0.000000   0.001351   0.002185
 17.5  -0.003507  -0.001796   0.000000   0.000944   0.001915
 20.0  -0.003644  -0.001766   0.000000   0.001049   0.002087
 22.5  -0.002945  -0.001205   0.000000   0.000702   0.001512
 24.0  -0.002842  -0.001476   0.000000   0.000768   0.001605
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					</tableData>
				</table>
			</product>
		</function>

		<function name="aero/moment/yaw-due-to-the-right-aileron-deflection">
			<description>right due to the left aileron deflection</description>
			<product>
				<property>aero/qbar-psf</property>
				<property>metrics/Sw-sqft</property>
				<property>metrics/bw-ft</property>
				<table>
					<independentVar lookup="row">aero/alpha-deg</independentVar>
					<independentVar lookup="column">fcs/right-aileron-pos-deg</independentVar>
					<tableData>
             -12         -5          0          5         10
-25.0  -0.001466  -0.000614   0.000000   0.000776   0.001542
-22.5  -0.001463  -0.000609   0.000000   0.000744   0.001575
-20.0  -0.001385  -0.000574   0.000000   0.000837   0.001297
-17.5  -0.001223  -0.000502   0.000000   0.000750   0.001279
-15.0  -0.000698  -0.000116   0.000000   0.003316   0.003131
-12.5  -0.001357  -0.000259   0.000000   0.002333   0.000950
-10.0  -0.000650  -0.000020   0.000000   0.000127   0.000407
 -7.5   0.000455   0.000127   0.000000  -0.000013   0.000133
 -5.0   0.000766   0.000297   0.000000  -0.000173  -0.000203
 -2.5   0.001156   0.000489   0.000000  -0.000377  -0.000605
  0.0   0.001570   0.000633   0.000000  -0.000526  -0.000879
  2.5   0.002081   0.000816   0.000000  -0.000625  -0.000831
  5.0   0.002441   0.000950   0.000000  -0.000629  -0.000693
  7.5   0.002715   0.001058   0.000000  -0.000597  -0.000515
 10.0   0.002390   0.000890   0.000000  -0.000197  -0.001262
 12.5   0.002794   0.001421   0.000000  -0.001713  -0.002715
 15.0   0.004298   0.001425   0.000000  -0.001351  -0.002185
 17.5   0.003507   0.001796   0.000000  -0.000944  -0.001915
 20.0   0.003644   0.001766   0.000000  -0.001049  -0.002087
 22.5   0.002945   0.001205   0.000000  -0.000702  -0.001512
 24.0   0.002842   0.001476   0.000000  -0.000768  -0.001605
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					</tableData>
				</table>
			</product>
		</function>

	</axis>

</aerodynamics>
